*Node
      1, 0.0748801902,  0.283369243
      2, 0.0763744786,  0.282000005
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*Element, type=CAX3
   1,  170,  479,  481
   2,  463,  417,  621
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*Nset, nset=UPPER_NODE, generate
   1,  724,    1
*Elset, elset=UPPER_ELEMENT, generate
    1,  1346,     1
**Section,MaterType=ElastoPlasticity
*Solid Section,elset=UPPER_ELEMENT,material=die
,
**
*Node
    725, 0.0769728497,  0.162499994
    726, 0.0749804452,   0.16067411
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*Element, type=CAX3
1347,  737,  956,  957
1348,  908,  963,  964
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*Nset, nset=LOWER_NODE, generate
  725,  1060,    1
*Elset, elset=LOWER_ELEMENT, generate
 1347,  1953,     1
**Section,MaterType=ElastoPlasticity
*Solid Section,elset=LOWER_ELEMENT,material=die
,
**
*Node
   1061, 0.0389399007,  0.129999995
   1062, 0.0289535914,  0.120523095
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*Element, type=CAX4
1954, 1534, 1759, 1762, 1761
1955, 1535, 1760, 1762, 1759
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*Nset, nset=ALLOY_NODE, generate
 1061,  3143,     1
*Nset, nset=ALLOY_SYMMETRY
 1064, 1065, 1135, 1136, 1137, 1138
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*Elset, elset=ALLOY_ELEMENT, generate
 1954,  3890,     1
**Section,MaterType=ElastoPlasticity
*Solid Section,elset=ALLOY_ELEMENT,material=alloy
,
**
*Elset, elset=_ALLOY_SURF_S1
 1984, 2005, 2009, 2018, 2022, 2026
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*Elset, elset=_ALLOY_SURF_S4
 1985, 2006, 2010, 2015, 2019, 2023
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*Elset, elset=_LOWER_SURF_S1
 1357, 1418, 1450, 1466, 1471, 1483
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*Elset, elset=_LOWER_SURF_S2
 1425, 1951
*Elset, elset=_LOWER_SURF_S3
 1425, 1951
*Elset, elset=_UPPER_SURF_S1
   14,   15,   19,   24,   55,   68
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*Elset, elset=_UPPER_SURF_S2
 1346,
*Elset, elset=_UPPER_SURF_S3
 1346,
*Surface, type=ELEMENT, name=ALLOY_SURF
_ALLOY_SURF_S1, S1
_ALLOY_SURF_S4, S4
*Surface, type=ELEMENT, name=LOWER_SURF
_LOWER_SURF_S1, S1
_LOWER_SURF_S2, S2
_LOWER_SURF_S3, S3
*Surface, type=ELEMENT, name=UPPER_SURF
_UPPER_SURF_S2, S2
_UPPER_SURF_S3, S3
_UPPER_SURF_S1, S1
**
** 曲线定义
*Amplitude, name=LOAD1
0,0,
0.04741,-0.04741,
** 曲线定义
*Amplitude, name=UNLOAD1
0,-0.04741,
2,0,
** 曲线定义
*Amplitude, name=LOAD2
0,0,
0.08241,-0.08241,
** 曲线定义
*Amplitude, name=UNLOAD2
0,-0.08241,
2,0,
** 曲线定义
*Amplitude, name=LOAD3
0,0,
0.11741,-0.11741,
**
**
**
**
 ** MATERIALS
 **
*Material, name=alloy
*density
8240.
*elastic
150e9,0.32,600
141e9,0.33,700
*expansion,20.
1.43E-05,500
1.58E-05,760
1.70E-05,800
1.84E-05,900
1.87E-05,1000
*conductivity
20.9,600
24.1,700
26.1,800
25.7,900
26.3,1000
*specific heat
558.0,600
609.4,700
660.3,800
649.2,900
671.4,1000
*rate-dependentplastic
1,200e9,0.3,80821.638e6,-0.00655,-0.0017,-0.127,0.186
*damage
1,1000
*dynamicrecrystallization
0.004659,0.,0.1238,49520.,0.,0,0,50.,
5.043e-9,0.,-1.42,-0.408,196000.,0.,0.8,0.693,
1.,485.e8,0.,-0.41,-0.028,-24.e4,0.
**
*Material, name=die
*density
8570
*elastic
200e9,0.3
*conductivity
20
*specific heat
510
**
**
**
** 接触信息
*Surface Interaction,name=IntProp-0
*Friction,slip tolerance=0.005
0.4,1e12
*Surface Behavior,pressure-overclosure=LINEAR
1e14
*Gap Conductance
1000
*Surface Interaction,name=IntProp-1
*Friction,slip tolerance=0.005
0.4,1e12
*Surface Behavior,pressure-overclosure=LINEAR
1e14
*Gap Conductance
1000
*contact pair,interaction=IntProp-0,type=SURFACE TO SURFACE
ALLOY_SURF,UPPER_SURF
*contact pair,interaction=IntProp-1,type=SURFACE TO SURFACE
ALLOY_SURF,LOWER_SURF
** 边界条件
*Boundary
** fixedname=fixedbc0
ALLOY_SYMMETRY, 1,1
*Boundary
** fixedname=fixedbc1
UPPER_NODE, 1,1
*Boundary
** fixedname=fixedbc2
LOWER_NODE, 1,1
*Boundary
** fixedname=fixedbc3
LOWER_NODE, 2,2
**
** 初始化
*Initial Conditions, type=TEMPERATURE
UPPER_NODE, 380
*Initial Conditions, type=TEMPERATURE
LOWER_NODE, 380
*Initial Conditions, type=TEMPERATURE
ALLOY_NODE, 1120
**
*Physical Constants,absolute zero=-273,stefan boltzmann=5.6704e-08
** 结果输出间隔
*TIME POINTS,NAME=T0,GENERATE
0,0.04741,0.001
** 结果输出间隔
*TIME POINTS,NAME=T1,GENERATE
0,2,0.5
** 结果输出间隔
*TIME POINTS,NAME=T2,GENERATE
0,0.08241,0.001
** 结果输出间隔
*TIME POINTS,NAME=T3,GENERATE
0,2,0.5
** 结果输出间隔
*TIME POINTS,NAME=T4,GENERATE
0,0.11741,0.001
**--------------------------------------------------
** Step - 1求解器设置
*Step, inc=1000000, nlgeom=YES
*uncoupled Temperature-displacement,deltmx= 50
0.00001,0.04741,1e-15,0.0001
**
*Boundary,amplitude=LOAD1
**MontionName=m0
UPPER_NODE,2,2,1
**
**
**
*NODE FILE,TIME POINTS=T0
U,NT
*EL FILE,TIME POINTS=T0
S,E,SDV
*NODE PRINT,NSET=UPPER_NODE,TIME POINTS=T0,TOTALS=ONLY
*End Step
**--------------------------------------------------
** Step - 2求解器设置
*Step, inc=1000000, nlgeom=YES
*uncoupled Temperature-displacement,deltmx= 50
0.0001,2,1e-15,0.1
**
*Boundary,amplitude=UNLOAD1
**MontionName=m1
UPPER_NODE,2,2,1
**
**
**
*NODE FILE,TIME POINTS=T1
U,NT
*EL FILE,TIME POINTS=T1
S,E,SDV
*NODE PRINT,NSET=UPPER_NODE,TIME POINTS=T1,TOTALS=ONLY
*End Step
**--------------------------------------------------
** Step - 3求解器设置
*Step, inc=1000000, nlgeom=YES
*uncoupled Temperature-displacement,deltmx= 50
0.00001,0.08241,1e-15,0.0001
**
*Boundary,amplitude=LOAD2
**MontionName=m2
UPPER_NODE,2,2,1
**
**
**
*NODE FILE,TIME POINTS=T2
U,NT
*EL FILE,TIME POINTS=T2
S,E,SDV
*NODE PRINT,NSET=UPPER_NODE,TIME POINTS=T2,TOTALS=ONLY
*End Step
**--------------------------------------------------
** Step - 4求解器设置
*Step, inc=1000000, nlgeom=YES
*uncoupled Temperature-displacement,deltmx= 50
0.0001,2,1e-15,0.1
**
*Boundary,amplitude=UNLOAD2
**MontionName=m3
UPPER_NODE,2,2,1
**
**
**
*NODE FILE,TIME POINTS=T3
U,NT
*EL FILE,TIME POINTS=T3
S,E,SDV
*NODE PRINT,NSET=UPPER_NODE,TIME POINTS=T3,TOTALS=ONLY
*End Step
**--------------------------------------------------
** Step - 5求解器设置
*Step, inc=1000000, nlgeom=YES
*uncoupled Temperature-displacement,deltmx= 50
0.00001,0.11741,1e-15,0.0001
**
*Boundary,amplitude=LOAD3
**MontionName=m4
UPPER_NODE,2,2,1
**
**
**
*NODE FILE,TIME POINTS=T4
U,NT
*EL FILE,TIME POINTS=T4
S,E,SDV
*NODE PRINT,NSET=UPPER_NODE,TIME POINTS=T4,TOTALS=ONLY
*End Step
